variable	P equal 1.0 # pressure (Bar)
variable 	T equal 300.0 # desired temperature (K)
variable	convert equal 1.44e-5 # from Bar*A^2 to Kcal/mol/A

boundary	p p p
units		real
atom_style	full
bond_style	harmonic
angle_style	harmonic
dihedral_style  opls
improper_style	harmonic

pair_style	lj/cut/coul/long 12.0
kspace_style	pppm 1.0e-4
pair_modify 	shift yes mix arithmetic
special_bonds	lj 0.0 0.0 0.5 coul 0.0 0.0 1.0 angle yes dihedral yes

read_data	../Construction/data.lammps
include 	../Construction/PARM.lammps

group		CH type 1 2
group		H2O type 3 4
group		FeO type 5 6
region		top block INF INF INF INF 0 INF
region		bot block INF INF INF INF INF 0
group		top region top
group		bot region bot
group		UpperSurface intersect top FeO
group		LowerSurface intersect bot FeO
variable 	Nwall equal count(UpperSurface)
variable 	Surface equal lx*ly
variable 	FzL equal ${P}*${Surface}*${convert}/${Nwall}
variable 	FzU equal -${P}*${Surface}*${convert}/${Nwall}
fix 		myad1 UpperSurface addforce 0 0 v_FzU
fix 		myad2 LowerSurface addforce 0 0 v_FzL

compute 	TLowS LowerSurface temp
compute 	THighS UpperSurface temp
compute 	Twat H2O temp

velocity 	H2O create ${T} 84512 rot yes dist gaussian

fix 		tb1 LowerSurface temp/berendsen ${T} ${T} 100
fix_modify 	tb1 temp TLowS
fix 		tb2 UpperSurface temp/berendsen ${T} ${T} 100
fix_modify 	tb2 temp THighS
fix 		tb3 H2O temp/berendsen ${T} ${T} 100
fix_modify 	tb3 temp Twat

fix		s1 H2O shake 1.0e-4 200 0 b 3 a 3
fix		mynve1 H2O nve
fix		mynve2 FeO nve

dump 		dp1 all atom 5000 dump.lammpstrj

timestep	0.1
thermo		1000
run		1000

timestep	1.0
run		50000

write_data	data.equilibrium
