# lammps equilibrate

variable 	T equal 300 		# desired temperature (K)
variable	p0 equal 1e5  		# desired pressure (Pa)

boundary	p p p
units		real

atom_style	full
bond_style	harmonic
angle_style	harmonic
dihedral_style	harmonic
improper_style	harmonic

pair_style	lj/cut/tip4p/long 4 5 9 3 0.1546 12.0
kspace_style	pppm/tip4p 1.0e-4

pair_modify 	shift yes mix arithmetic
special_bonds	lj 0.0 0.0 0.5 coul 0.0 0.0 1.0 angle yes dihedral yes

read_data	data.lammps
include 	PARM.lammps

region		TopR block INF INF INF INF 0 INF
region		BotR block INF INF INF INF INF 0

group		HBC type 1 2
group		pst type 3
group		H2O type 4 5

neighbor 	2.0 bin
neigh_modify	exclude group pst pst

group		TopA region TopR
group		BotA region BotR
group		pstTop intersect pst TopA
group		pstBot intersect pst BotA

# Pressure on Piston
variable	nb equal count(pstTop)
variable 	srf equal lx*ly
variable	f0 equal ${p0}*${srf}/${nb}*1.44e-10 # force per atom in Kcal/mol/A ensuring a pressure of p0
fix    	af1 pstTop aveforce NULL NULL -${f0}
fix    	af2 pstBot aveforce NULL NULL ${f0}
fix 		sf1 pstTop setforce 0.0 0.0 NULL
fix 		sf2 pstBot setforce 0.0 0.0 NULL

compute	tpi H2O temp
fix 		myber H2O temp/berendsen ${T} ${T} 100
fix_modify	myber temp tpi
fix 		mynve1 H2O nve
fix 		mynve2 pst nve
fix		myshk H2O shake 1.0e-4 200 0 b 9 a 3
fix		myrct all recenter NULL NULL INIT

dump 		mydmp all atom 5000 dump.eq.lammpstrj

timestep 	1.0
thermo 	1000
thermo_modify 	temp tpi
run		50000
write_data	data.equilibrium
