# ============= This LAMMPS input script simulates a hexaben molecule in water
# ============= Tested with the 30Jul2021 version of LAMMPS
# ============= Written by Simon Gravelle (https://simongravelle.github.io/)
# ============= Find more scripts here: https://github.com/simongravelle/lammps-input-files
# ============= LAMMPS tutorials for beginners: https://lammpstutorials.github.io/

# ============= please cite https://doi.org/10.1103/PhysRevFluids.6.034303

# ============= define variables
variable 	T equal 300 		# desired temperature (K)
variable	p0 equal 1e5  		# desired pressure (Pa)

# ============= basic parameters
boundary	p p p
units		real
atom_style	full
bond_style	harmonic
angle_style	harmonic
dihedral_style	harmonic
improper_style	harmonic
pair_style	lj/cut/tip4p/long 4 5 9 3 0.1546 12.0
kspace_style	pppm/tip4p 1.0e-4
pair_modify 	shift yes mix arithmetic
special_bonds	lj 0.0 0.0 0.5 coul 0.0 0.0 1.0 angle yes dihedral yes

# ============= read data and parameters
read_data	data.lammps
include 	PARM.lammps

# ============= define regions and groups
region		TopR block INF INF INF INF 0 INF
region		BotR block INF INF INF INF INF 0
group		HBC type 1 2
group		pst type 3
group		H2O type 4 5
group		TopA region TopR
group		BotA region BotR
group		pstTop intersect pst TopA
group		pstBot intersect pst BotA

# ============= control neighbor list (exclude immobile atoms)
neighbor 	2.0 bin
neigh_modify	exclude group pst pst

# ============= control pressure on piston
# ============= for piston to move as a block
variable	nb equal count(pstTop)
variable 	srf equal lx*ly
variable	f0 equal ${p0}*${srf}/${nb}*1.44e-10 # force per atom in Kcal/mol/A ensuring a pressure of p0
fix    		af1 pstTop aveforce NULL NULL -${f0}
fix    		af2 pstBot aveforce NULL NULL ${f0}
fix 		sf1 pstTop setforce 0.0 0.0 NULL
fix 		sf2 pstBot setforce 0.0 0.0 NULL

# ============= thermalise water
# ============= solve netwon equation for piston and water
# ============= maintain water rigid
# ============= recenter whole system
velocity 	H2O create ${T} 4928459 rot yes mom yes dist gaussian
compute		tpi H2O temp
fix 		myber H2O temp/berendsen ${T} ${T} 100
fix_modify	myber temp tpi
fix 		mynve1 H2O nve
fix 		mynve2 pst nve
fix		myshk H2O shake 1.0e-4 200 0 b 9 a 3
fix		myrct all recenter NULL NULL INIT
timestep 	1.0

# ============= dump atom positions every 5 ps and log info every 1 ps
dump 		mydmp all atom 5000 dump.eq.lammpstrj
thermo 		1000
thermo_modify 	temp tpi

# ============= run (50 ps)
run		50000

# ============= write final state of simulation
write_data	data.equilibrium
