# LAMMPS input file
# Created using atb2lammps
# https://github.com/simongravelle/atb2lammps

boundary p p p
units real
atom_style      full
bond_style      harmonic
angle_style     charmm
dihedral_style  charmm
improper_style  harmonic
pair_style      lj/cut/coul/long 14
kspace_style    pppm 0.0001
special_bonds lj 0.0 0.0 0.5 coul 0.0 0.0 1.0 angle yes dihedral yes
read_data data.lammps
include parm.lammps
minimize 1.0e-5 1.0e-7 1000 10000
reset_timestep 0
fix mynvt all npt temp 300 300 100 iso 10 1 1000
timestep 1.0
dump mydmp all atom 1000 dump.lammpstrj
thermo 1000
run 20000
replicate 3 3 3
write_data peg.data
