# This LAMMPS input script simulates the melting of a cube of Au
# Written by Simon Gravelle (https://simongravelle.github.io/)
# Find more scripts here: https://github.com/simongravelle/lammps-input-files
# LAMMPS tutorials for beginners: https://lammpstutorials.github.io/

variable fccAu equal 4.065
variable L1 equal ${fccAu}*8
variable L2 equal ${fccAu}*4
variable Ti equal 1
variable Tf equal 2500

units metal
boundary p p p
atom_style atomic

region system block -${L1} ${L1} -${L1} ${L1} -${L1} ${L1}
region cube block -${L2} ${L2} -${L2} ${L2} -${L2} ${L2}
create_box 1 system

include parm.lammps

lattice fcc 4.065
create_atoms 1 region cube # place atoms on lattice
lattice none 1.0 # re-set lattice to default valu

velocity all create ${Ti} 425521 rot yes mom yes dist gaussian
fix mynve all nve
fix myber all temp/berendsen ${Ti} ${Tf} 0.1
fix myrc all recenter INIT INIT INIT
timestep 0.001

dump dp1 all atom 1000 dump.lammpstrj
thermo 1000

run 100000
